// SBML level 3 version 2
// Created with https://github.com/matthiaskoenig/sbmlutils.

function time_trafo(time, Tshift, Trange)
  1*(log10(10^(time*10/Trange) + 10^(Tshift/1)) - log10(1 + 10^(Tshift/1)));
end
time_trafo is "Time transformation for the retarded response";  // SBO:0000474

model RTD_identical_response_times()
  // Reduced Model for the Retarded transient dynamics with equal response times.
  // Reduced Model of the Retarded Transient dynamics function of Clemens Kreutz. In: Frontiers in Physics: A New Approximation Approach for Transient Differential Equation Models doi: https://doi.org/10.3389/fphy.2020.00070
  // This model describes transient activation functions (no oscillations) with a transient and a sustained activation term.
  // Amplitutes A can be positive or negative
  // Reductions:
  // Sustained and transient response times are equal
  // Offset and Tshift can also be reduced via setting a fixed value in the PEtab parameter table
  // SBML format.
  // version: 1
  // Changelog
  // version 1
  // initial model

  // Compartments:
  compartment C = 1;

  // Species:
  species y_obs in C = 0; y_obs is "observed y";

  // Parameters:
  Asus = 1; Asus is "Amplitude sustained response";  // SBO:0000009
  Atrans = 1; Atrans is "Amplitude transient response";  // SBO:0000009
  t1 = 1; t1 is "Sustained AND transient response time constant";  // SBO:0000009
  t2 = 3; t2 is "Transient decay time constant";  // SBO:0000009
  Offset = 0.1;  // SBO:0000009
  Tshift = -2; Tshift is "Response time";  // SBO:0000009
  Trange = 5; Trange is "Time span of the data";  // SBO:0000009
  y has dimensionless; y is "response";

  // Assignment rules:
  y := Asus*(1 - exp(-time_trafo(time, Tshift, Trange)/t1)) + Atrans*(1 - exp(-time_trafo(time, Tshift, Trange)/t1))*exp(-time_trafo(time, Tshift, Trange)/t2) + Offset;

  // Reactions:
  R1: => y_obs; y;
end
