// SBML level 3 version 2
// Created with https://github.com/matthiaskoenig/sbmlutils.

model caffeine_pk()
  // Caffeine pharmacokinetics model
  // # Model of absorption and distribution of caffeine.
  // Simple two-compartment pharmacokinetics model for caffeine.
  // Terms of use
  // The content of this model has been carefully created in a manual research effort. This file has been created by Matthias König using sbmlutils. For questions contact koenigmx@hu-berlin.de. Copyright © 2024 Matthias König.
  // This work is licensed under a Creative Commons Attribution 4.0 International License.
  // Redistribution and use of any part of this model, with or without modification, are permitted provided that the following conditions are met:
  // Redistributions of this SBML file must retain the above copyright notice, this list of conditions and the following disclaimer.
  // Redistributions in a different form must reproduce the above copyright notice, this list of conditions and the following disclaimer in the documentation and/or other materials provided with the distribution.
  // This model is distributed in the hope that it will be useful, but WITHOUT ANY WARRANTY; without even the implied warranty of MERCHANTABILITY or FITNESS FOR A PARTICULAR PURPOSE.
  // snomed:447612001 ncit:C45247 taxonomy:10090
  // model units - substance: mmole, time: hr, volume: litre, area: m2, length: metre, extent: mmole

  // Compartments:
  // small fraction of total volume
  compartment Vgut = 0.00145 litre; Vgut is "gut compartment";  // SBO:0000290
  // The approximate blood volume of a mouse is 77-80 μl/g.
  compartment Vcent = 0.00232 litre; Vcent is "central compartment";  // SBO:0000290
  compartment Vperi = 0.02523 litre; Vperi is "peripheral compartment";  // SBO:0000290

  // Species:
  // handled in amount not concentration
  species caf_gut in Vgut = 0; caf_gut is "caffeine gut";  // SBO:0000247 pubchem.compound:2519 CHEBI:27732 ncit:C328
  species caf_cent in Vcent = 0; caf_cent is "caffeine plasma";  // SBO:0000247 pubchem.compound:2519 CHEBI:27732 ncit:C328
  species caf_peri in Vperi = 0; caf_peri is "caffeine peripheral";  // SBO:0000247 pubchem.compound:2519 CHEBI:27732 ncit:C328

  // Parameters:
  Mr_caf = 194.19 g_per_mole; Mr_caf is "molecular weight caffeine";  // SBO:0000647
  conc_conversion = 1000 ng_per_mug; conc_conversion is "conversion factor [µg/ml] -> [ng/ml]";
  caf_plasma has ng_per_ml; caf_plasma is "caffeine plasma [ng/ml]";  // pubchem.compound:2519 CHEBI:27732 ncit:C328 inchikey:RYYVLZVUVIJVGH-UHFFFAOYSA-N
  tau = 0.012 hr; tau is "response time";  // SBO:0000009
  kabs = 0.01 l_per_hr; kabs is "absorption rate";  // SBO:0000009
  CL = 0.01 l_per_hr; CL is "clearance caffeine";  // SBO:0000009
  Q = 0.1 l_per_hr; Q is "distribution Q";  // SBO:0000009

  // Assignment rules:
  caf_plasma := caf_cent*Mr_caf*conc_conversion;

  // Reactions:
  // [mmole/hr] absorption from gut
  APPLICATION: => caf_gut; 166.989*5*0.029/194.19*(1 - exp(-time/tau))*exp(-time/tau); APPLICATION is "application caffeine";  // SBO:0000176
  // [mmole/hr] absorption from gut
  ABSORPTION: caf_gut => caf_cent; kabs*caf_gut; ABSORPTION is "absorption caffeine";  // SBO:0000176
  // [mmole/hr] clearance from central compartment
  CLEARANCE: caf_cent => ; CL*caf_cent; CLEARANCE is "clearance caffeine";  // SBO:0000176
  // [mmole/hr] distribution in peripheral compartment
  transport_peripheral_R1: caf_cent => caf_peri; Q*caf_cent; transport_peripheral_R1 is "transport peripheral (R1)";  // SBO:0000176
  // [mmole/hr] distribution from peripheral compartment
  transport_central_R2: caf_peri => caf_cent; Q*caf_peri; transport_central_R2 is "transport central (R2)";  // SBO:0000176

  // Unit definitions:
  unit g_per_mole = gram / mole; g_per_mole is "g/mole";
  unit hr = 3600 second;
  unit l_per_hr = litre / (3600 second); l_per_hr is "l/hr";
  unit l_per_hr_mmole = litre / (3600 second * 1e-3 mole); l_per_hr_mmole is "l/hr/mmole";
  unit m2 = metre^2; m2 is "meter^2";
  unit mM = 1e-3 mole / litre; mM is "mmole/liter";
  unit mg = 1e-3 gram;
  unit mmole = 1e-3 mole;
  unit mmole_per_hr = 1e-3 mole / (3600 second); mmole_per_hr is "mmole/hr";
  unit mmole_per_hr_l = 1e-3 mole / (3600 second * litre); mmole_per_hr_l is "mmole/hr/liter";
  unit mug = 1e-6 gram; mug is "µg";
  unit ng_per_ml = 1e-3 gram / (1e-3 litre); ng_per_ml is "mg/ml";
  unit ng_per_mug = 1e-9 gram / (1e-6 gram); ng_per_mug is "ng/µg";
  unit per_hr = 1 / (3600 second); per_hr is "1/hr";
  unit per_hr_l = 1 / (3600 second * litre); per_hr_l is "1/hr/liter";
end
